Mon Nov  7 13:20:54 EST 2022
$PROBLEM SIR 106-104 + COV-effects(EGFR, AGE) on CL

$INPUT C NUM ID TIME SEQ CMT EVID AMT DV AGE WT HT EGFR ALB BMI SEX AAG
       SCR AST ALT CP TAFD TAD LDOS MDV BLQ PHASE OID

$DATA ../../../../data/derived/analysis3.csv IGNORE=(C='C', BLQ=1)

$SUBROUTINE ADVAN4 TRANS4

$PK

;log transformed PK parms

V2WT = LOG(WT/70)
CLWT = LOG(WT/70)*0.75
CLEGFR = LOG(EGFR/90)*THETA(6)
CLAGE = LOG(AGE/35)*THETA(7)
V3WT = LOG(WT/70)
QWT  = LOG(WT/70)*0.75
CLALB = LOG(ALB/4.5)*THETA(8)

KA   = EXP(THETA(1)+ETA(1))
V2   = EXP(THETA(2)+V2WT+ETA(2))
CL   = EXP(THETA(3)+CLWT+CLEGFR+CLAGE+CLALB+ETA(3))
V3   = EXP(THETA(4)+V3WT)
Q    = EXP(THETA(5)+QWT)

S2 = V2/1000 ; dose in mcg, conc in mcg/mL

$ERROR
IPRED = F
Y=IPRED*(1+EPS(1))

$THETA  ; log values
(0.441626028033638)   ;  1 KA (1/hr) - 1.5
(4.15804725830919)   ;  2 V2 (L) - 60
(1.17772542262673)   ;  3 CL (L/hr) - 3.5
(4.18880035188705)   ;  4 V3 (L) - 70
(1.24598671793572)   ;  5 Q  (L/hr) - 4
(0.469597045463499)   ;  6 CLEGFR~CL ()
(-0.0116155044261881)   ;  7 AGE~CL ()
(0.510831999323056)   ;  8 ALB~CL ()

$OMEGA BLOCK(3)
0.250292378419191                                 ;ETA(KA)
0.0705797074806664 0.0859935795768268                  ;ETA(V2)
0.122841280353288 0.0661530010227361 0.108770636905912   ;ETA(CL)

$SIGMA
0.0403044076565251     ; 1 pro error

$EST MAXEVAL=0 METHOD=1 INTER SIGL=6 NSIG=3 PRINT=1

NM-TRAN MESSAGES
 WARNINGS AND ERRORS (IF ANY) FOR PROBLEM    1
 (WARNING  2) NM-TRAN INFERS THAT THE DATA ARE POPULATION.
 LIM VALUES MAXLIM ASSESSED BY NMTRAN: 1,2,3,4,5,6,7,8,10,11,13,15,16

1NONLINEAR MIXED EFFECTS MODEL PROGRAM (NONMEM) VERSION 7.4.4
 ORIGINALLY DEVELOPED BY STUART BEAL, LEWIS SHEINER, AND ALISON BOECKMANN
 CURRENT DEVELOPERS ARE ROBERT BAUER, ICON DEVELOPMENT SOLUTIONS,
 AND ALISON BOECKMANN. IMPLEMENTATION, EFFICIENCY, AND STANDARDIZATION
 PERFORMED BY NOUS INFOSYSTEMS.
 PROBLEM NO.:         1
 SIR 106-104 + COV-effects(EGFR, AGE) on CL
 TOT. NO. OF OBS RECS:     3142
 TOT. NO. OF INDIVIDUALS:      160
 TWO COMPARTMENT MODEL WITH FIRST-ORDER ABSORPTION (ADVAN4)
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 #TBLN:      1
 #METH: First Order Conditional Estimation with Interaction (Evaluation)
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 Elapsed evaluation time in seconds:     0.79
 Elapsed postprocess time in seconds:     0.00

 ********************         FIRST ORDER CONDITIONAL ESTIMATION WITH INTERACTION (EVALUATION)       ********************
 #OBJT:**************                       MINIMUM VALUE OF OBJECTIVE FUNCTION                      ********************
 #OBJV:********************************************    30913.258       **************************************************

 ********************         FIRST ORDER CONDITIONAL ESTIMATION WITH INTERACTION (EVALUATION)       ********************
 ********************                             FINAL PARAMETER ESTIMATE                           ********************

 THETA - VECTOR OF FIXED EFFECTS PARAMETERS   *********
         TH 1      TH 2      TH 3      TH 4      TH 5      TH 6      TH 7      TH 8
         4.42E-01  4.16E+00  1.18E+00  4.19E+00  1.25E+00  4.70E-01 -1.16E-02  5.11E-01

 OMEGA - COV MATRIX FOR RANDOM EFFECTS - ETAS  ********
         ETA1      ETA2      ETA3
 ETA1
+        2.50E-01
 ETA2
+        7.06E-02  8.60E-02
 ETA3
+        1.23E-01  6.62E-02  1.09E-01

 SIGMA - COV MATRIX FOR RANDOM EFFECTS - EPSILONS  ****
         EPS1
 EPS1
+        4.03E-02

 OMEGA - CORR MATRIX FOR RANDOM EFFECTS - ETAS  *******
         ETA1      ETA2      ETA3
 ETA1
+        5.00E-01
 ETA2
+        4.81E-01  2.93E-01
 ETA3
+        7.44E-01  6.84E-01  3.30E-01

 SIGMA - CORR MATRIX FOR RANDOM EFFECTS - EPSILONS  ***
         EPS1
 EPS1
+        2.01E-01
 Elapsed finaloutput time in seconds:     0.00
 #CPUT: Total CPU Time in Seconds,        0.397
